*Heading
** Job name: paperclip Model name: Model-1
** Generated by: Abaqus/CAE 2019
*Preprint, echo=NO, model=NO, history=NO, contact=NO
**
** PARTS
**
*Part, name=clip
*Node
      1,          20.,           0.
      2,          20.,           4.
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*Element, type=CPS3
  1,   1,  17, 371
  2, 371,  84,   1
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*Nset, nset=fixed_nodeset
  3,  4, 51, 52, 53, 54, 55
*Elset, elset=fixed_nodeset, generate
 350,  360,    2
*Nset, nset=load_nodeset
   9,  10, 149, 150, 151, 152, 153
*Elset, elset=load_nodeset, generate
 926,  936,    2
*Nset, nset=all_mesh, generate
    1,  1155,     1
*Elset, elset=all_mesh, generate
    1,  1968,     1
** Section: Section-1
*Solid Section, elset=all_mesh, material=Material-1
,
*End Part
**
**
** ASSEMBLY
**
*Assembly, name=Assembly
**
*Instance, name=clip-1, part=clip
*End Instance
**
*End Assembly
**
** MATERIALS
**
*Material, name=Material-1
*Elastic
1., 0.3
** ----------------------------------------------------------------
**
** STEP: Load
**
*Step, name=Load, nlgeom=NO
*Static
1., 1., 1e-05, 1.
**
** BOUNDARY CONDITIONS
**
** Name: Fixed Type: Displacement/Rotation
*Boundary
clip-1.fixed_nodeset, 1, 1
clip-1.fixed_nodeset, 2, 2
**
** OUTPUT REQUESTS
**
*Restart, write, frequency=0
**
** FIELD OUTPUT: F-Output-1
**
*Output, field
*Node Output
UT,
*Element Output, directions=YES
S,
**
** HISTORY OUTPUT: H-Output-1
**
*Output, history, variable=PRESELECT
*End Step
